// SBML level 2 version 4
// A two-state cascade A -> B -> 0, purpose-built for the lanl/PyBNF#572 evaluation.
//      Deliberately minimal: two rate constants, one observed state with a rise-and-fall
//      shape, so the simulated column s(theta) genuinely changes shape with theta rather
//      than only in amplitude. `scale`, `offset` and `sigma` are NOT model parameters:
//      they live only in the conf's observable formula and noise model, exactly as they do
//      in the imported PEtab slugs.

model linear_observable()

  // Compartments:
  compartment cell = 1;

  // Species:
  species A in cell = 1;
  species B in cell = 0;

  // Parameters:
  k1 = 0.8;
  k2 = 0.25;

  // Reactions:
  transfer: A => B; k1*A;
  clearance: B => ; k2*B;
end
